# Required import for python
import Sofa


# Choose in your script to activate or not the GUI
USE_GUI = True


def main():
    import SofaRuntime
    import Sofa.Gui
    SofaRuntime.importPlugin("SofaOpenglVisual")
    SofaRuntime.importPlugin("SofaImplicitOdeSolver")

    root = Sofa.Core.Node("root")
    createScene(root)
    Sofa.Simulation.init(root)

    if not USE_GUI:
        for iteration in range(10):
            Sofa.Simulation.animate(root, root.dt.value)
    else:
        Sofa.Gui.GUIManager.Init("myscene", "qglviewer")
        Sofa.Gui.GUIManager.createGUI(root, __file__)
        Sofa.Gui.GUIManager.SetDimension(1080, 1080)
        Sofa.Gui.GUIManager.MainLoop(root)
        Sofa.Gui.GUIManager.closeGUI()


def createScene(root):
    root.gravity=[0, -9.81, 0]
    root.dt=0.02

    #ADD PLUGINS
    root.addObject("RequiredPlugin", pluginName=[    'Sofa.Component.Collision.Detection.Algorithm',
    'Sofa.Component.Collision.Detection.Intersection',
    'Sofa.Component.Collision.Geometry',
    'Sofa.Component.Collision.Response.Contact',
    'Sofa.Component.Constraint.Projective',
    'Sofa.Component.IO.Mesh',
    'Sofa.Component.LinearSolver.Iterative',
    'Sofa.Component.Mapping.Linear',
    'Sofa.Component.Mass',
    'Sofa.Component.ODESolver.Backward',
    'Sofa.Component.SolidMechanics.FEM.Elastic',
    'Sofa.Component.StateContainer',
    'Sofa.Component.Topology.Container.Dynamic',
    'Sofa.Component.Visual',
    'Sofa.GL.Component.Rendering3D'
    ])

    #DEFAULT ANIMATION LOOP
    root.addObject('DefaultAnimationLoop')

    #ADD COLLISION PIPELINE
    root.addObject('VisualStyle', displayFlags="showCollisionModels")
    root.addObject('CollisionPipeline', name="CollisionPipeline")
    root.addObject('BruteForceBroadPhase', name="BroadPhase")
    root.addObject('BVHNarrowPhase', name="NarrowPhase")
    root.addObject('DefaultContactManager', name="CollisionResponse", response="PenalityContactForceField")
    root.addObject('DiscreteIntersection')


    #ADD LIVER MODEL
    root.addObject('MeshOBJLoader', name="LiverSurface", filename="mesh/liver-smooth.obj")

    liver = root.addChild('Liver')
    #LIVER MECH. MODEL
    liver.addObject('EulerImplicitSolver', name="cg_odesolver", rayleighStiffness="0.1", rayleighMass="0.1")
    liver.addObject('CGLinearSolver', name="linear_solver", iterations="25", tolerance="1e-09", threshold="1e-09")
    liver.addObject('MeshGmshLoader', name="meshLoader", filename="mesh/liver.msh")
    liver.addObject('TetrahedronSetTopologyContainer', name="topo", src="@meshLoader")
    liver.addObject('MechanicalObject', name="dofs", src="@meshLoader")
    liver.addObject('TetrahedronSetGeometryAlgorithms', template="Vec3d", name="GeomAlgo")
    liver.addObject('DiagonalMass', name="Mass", massDensity="1.0")
    liver.addObject('TetrahedralCorotationalFEMForceField', template="Vec3d", name="FEM", method="large", poissonRatio="0.3", youngModulus="3000", computeGlobalMatrix="0")
    liver.addObject('FixedConstraint', name="FixedConstraint", indices="3 39 64")

    #LIVER VISUAL MODEL
    visual = liver.addChild('Visual Model')
    visual.addObject('OglModel', name="VisualModel", src="@../../LiverSurface")
    visual.addObject('BarycentricMapping', name="VisualMapping", input="@../dofs", output="@VisualModel")

    #LIVER COLLISION MODEL
    collision = liver.addChild('Collision')
    collision.addObject('SphereLoader', name="sphereLoader", filename="mesh/liver.sph")
    collision.addObject('MechanicalObject', name="spheres", position="@sphereLoader.position")
    collision.addObject('SphereCollisionModel', name="CollisionModel", listRadius="@sphereLoader.listRadius")
    collision.addObject('BarycentricMapping', name="CollisionMapping", input="@../dofs", output="@spheres")

    return root


# Function used only if this script is called from a python environment
if __name__ == '__main__':
    main()
